NJ-0502 FWD | Yehudi yb=40% te=0.10 | airfoil_lab03 | CDp=CD0
# Offsets iguais a fwd/aft: wing Z=-2.14 | EH Z=+1.60 | EV Z=+0.25 | nac Z=-5
# Planta: CR=14.022 CB=5.215 ct=2.004 MAC=7.9700 | Sf/Sa = DT opt
#Mach
 0.85

#IYsym IZsym Zsym
 0 0 0.0

#Sref Cref Bref
 382.9341 7.9700 63.6815

#Xref Yref Zref
 28.7514 0.0 -1.0400

# CDp
 0.013280
SURFACE
Wing
12 1.0 60 -1.5
COMPONENT
1
YDUPLICATE
0.0
TRANSLATE
0.0 0.0 -2.140

SECTION
17.8545 0.0000 -1.0400 14.0220 -0.000
AFILE
airfoil_lab03.dat
CONTROL
flap 1.0 0.855 0. 0. 0. +1

SECTION
20.1441 2.9800 -0.8055 11.9614 -0.281
AFILE
airfoil_lab03.dat
CONTROL
slat -1.0 -0.140 0. 0. 0. +1
CONTROL
flap 1.0 0.830 0. 0. 0. +1

SECTION
27.6400 12.7363 -0.0376 5.2151 -1.200
AFILE
airfoil_lab03.dat
CONTROL
slat -1.0 -0.140 0. 0. 0. +1
CONTROL
flap 1.0 0.609 0. 0. 0. +1

SECTION
31.0649 17.1940 0.3132 4.4659 -1.620
AFILE
airfoil_lab03.dat
CONTROL
slat -1.0 -0.140 0. 0. 0. +1
CONTROL
flap 1.0 0.609 0. 0. 0. +1

SECTION
34.4899 21.6517 0.6640 3.7168 -2.040
AFILE
airfoil_lab03.dat
CONTROL
slat -1.0 -0.140 0. 0. 0. +1
CONTROL
aileron -1.0 0.655 0. 0. 0. -1

SECTION
38.4041 26.7462 1.0650 2.8606 -2.520
AFILE
airfoil_lab03.dat
CONTROL
slat -1.0 -0.140 0. 0. 0. +1
CONTROL
aileron -1.0 0.655 0. 0. 0. -1

SECTION
42.3183 31.8408 1.4659 2.0044 -3.000
AFILE
airfoil_lab03.dat
CONTROL
aileron -1.0 0.655 0. 0. 0. -1

SURFACE
Stab
8 1.0 16 -1.5
COMPONENT
2
YDUPLICATE
0.0
TRANSLATE
0.0 0.0 1.600

SECTION
60.1603 0.0000 2.2200 4.9297 0.0
CONTROL
elevator 1.0 0.650 0. 0. 0. +1

SECTION
66.1211 7.7643 3.1129 1.9719 0.0
CONTROL
elevator 1.0 0.650 0. 0. 0. +1

SURFACE
Fin
8 1.0 12 1.0
COMPONENT
3
TRANSLATE
0.0 0.0 0.250

SECTION
58.1342 0.0 3.5700 6.9558 0.0
CONTROL
rudder 1.0 0.680 0. 0. 0. +1

SECTION
66.1859 0.0 11.9816 2.7127 0.0
CONTROL
rudder 1.0 0.680 0. 0. 0. +1

BODY
Fuselage
30 1.0
SCALE
65.090 5.960 5.960
TRANSLATE
0.0 0.0 0.000
BFILE
fuseB737_nondim.dat

SURFACE
Nacelle
6 1.0 12 0.0
COMPONENT
4
YDUPLICATE
0.0
SCALE
6.060 1.970 1.970
TRANSLATE
19.416 9.920 -5

SECTION
 0.0 0.0000 1.0000 1.0 0. 1 0.
SECTION
 0.0 0.5000 0.8660 1.0 0. 1 0.
SECTION
 0.0 0.8660 0.5000 1.0 0. 1 0.
SECTION
 0.0 1.0000 0.0000 1.0 0. 1 0.
SECTION
 0.0 0.8660 -0.5000 1.0 0. 1 0.
SECTION
 0.0 0.5000 -0.8660 1.0 0. 1 0.
SECTION
 0.0 0.0000 -1.0000 1.0 0. 1 0.
SECTION
 0.0 -0.5000 -0.8660 1.0 0. 1 0.
SECTION
 0.0 -0.8660 -0.5000 1.0 0. 1 0.
SECTION
 0.0 -1.0000 -0.0000 1.0 0. 1 0.
SECTION
 0.0 -0.8660 0.5000 1.0 0. 1 0.
SECTION
 0.0 -0.5000 0.8660 1.0 0. 1 0.
SECTION
 0.0 -0.0000 1.0000 1.0 0. 1 0.
