NJ-0502 FWD | DT my_airplane | trapezio | airfoil_lab03 | CDp=CD0 | washout -7.0 deg (extra, nao oficial)
# Offsets iguais a fwd/aft: wing Z=-2.14 | EH Z=+1.60 | EV Z=+0.25 | nac Z=-5
# Planta TRAPEZIO (sem quebra): CR=10.022 ct=2.004 MAC=6.9041
#Mach
 0.85

#IYsym IZsym Zsym
 0 0 0.0

#Sref Cref Bref
 382.9341 6.9041 63.6815

#Xref Yref Zref
 28.751228 0.0 0

# CDp
 0.013280
SURFACE
Wing
12 1.0 60 -1.5
COMPONENT
1
YDUPLICATE
0.0
TRANSLATE
0.0 0.0 -2.140
ANGLE
4.5

SECTION
17.8545 0.0000 -1.0400 10.0221 -0.0000
AFILE
airfoil_lab03.dat
CONTROL
flap 1.0 0.720 0. 0. 0. +1

SECTION
20.1441 2.9800 -0.8055 9.2717 -0.6551
AFILE
airfoil_lab03.dat
CONTROL
slat -1.0 -0.140 0. 0. 0. +1
CONTROL
flap 1.0 0.720 0. 0. 0. +1

SECTION
34.0006 21.0149 0.6139 4.7304 -4.6200
AFILE
airfoil_lab03.dat
CONTROL
slat -1.0 -0.140 0. 0. 0. +1
CONTROL
flap 1.0 0.720 0. 0. 0. +1

SECTION
34.4899 21.6517 0.6640 4.5701 -4.7600
AFILE
airfoil_lab03.dat
CONTROL
slat -1.0 -0.140 0. 0. 0. +1
CONTROL
aileron -1.0 0.700 0. 0. 0. -1

SECTION
39.8719 28.6567 1.2153 2.8062 -6.3000
AFILE
airfoil_lab03.dat
CONTROL
slat -1.0 -0.140 0. 0. 0. +1
CONTROL
aileron -1.0 0.700 0. 0. 0. -1

SECTION
42.3183 31.8408 1.4659 2.0044 -7.0000
AFILE
airfoil_lab03.dat
CONTROL
aileron -1.0 0.700 0. 0. 0. -1

SURFACE
Stab
8 1.0 16 -1.5
COMPONENT
2
YDUPLICATE
0.0
TRANSLATE
0.0 0.0 1.600

SECTION
60.1603 0.0000 2.2200 4.9297 0.0
CONTROL
elevator 1.0 0.650 0. 0. 0. +1
DESIGN
it 1.0

SECTION
66.1211 7.7643 3.1129 1.9719 0.0
CONTROL
elevator 1.0 0.650 0. 0. 0. +1
DESIGN
it 1.0

SURFACE
Fin
8 1.0 12 1.0
COMPONENT
3
TRANSLATE
0.0 0.0 0.250

SECTION
58.1342 0.0 3.5700 6.9558 0.0
CONTROL
rudder 1.0 0.680 0. 0. 0. +1

SECTION
66.1859 0.0 11.9816 2.7127 0.0
CONTROL
rudder 1.0 0.680 0. 0. 0. +1

BODY
Fuselage
30 1.0
SCALE
65.090 5.960 5.960
TRANSLATE
0.0 0.0 0.000
BFILE
fuseB737_nondim.dat

SURFACE
Nacelle
6 1.0 12 0.0
COMPONENT
4
YDUPLICATE
0.0
SCALE
6.060 1.970 1.970
TRANSLATE
19.416 9.920 -5.000

SECTION
 0.0 0.0000 1.0000 1.0 0. 1 0.
SECTION
 0.0 0.5000 0.8660 1.0 0. 1 0.
SECTION
 0.0 0.8660 0.5000 1.0 0. 1 0.
SECTION
 0.0 1.0000 0.0000 1.0 0. 1 0.
SECTION
 0.0 0.8660 -0.5000 1.0 0. 1 0.
SECTION
 0.0 0.5000 -0.8660 1.0 0. 1 0.
SECTION
 0.0 0.0000 -1.0000 1.0 0. 1 0.
SECTION
 0.0 -0.5000 -0.8660 1.0 0. 1 0.
SECTION
 0.0 -0.8660 -0.5000 1.0 0. 1 0.
SECTION
 0.0 -1.0000 -0.0000 1.0 0. 1 0.
SECTION
 0.0 -0.8660 0.5000 1.0 0. 1 0.
SECTION
 0.0 -0.5000 0.8660 1.0 0. 1 0.
SECTION
 0.0 -0.0000 1.0000 1.0 0. 1 0.
