NJ-0502 (my_airplane) - asa com quebra tipo Yehudi para alojar o trem de pouso principal
#  Unidades: METROS / graus. Gerado a partir de designTool 'my_airplane' (otimo Lab 02).
#  BF interno vertical em x=33.157 m, quebra em y=12.000 m, nacele adiantada para x_n=21.00 m.
#  Preservados: S=386.478 m2, enflechamento de BA=37.697 deg, corda de ponta=2.0085 m, b=64.139 m.

#Mach
 0.85

#IYsym   IZsym   Zsym
 0       0       0.0

#Sref      Cref      Bref
 386.4778  8.1073    64.1393

#Xref     Yref     Zref
 29.8632  0.0      -1.0400

# CDp
 0.0000

#----------------------------------------------------------------------
SURFACE
Wing
#Nchordwise  Cspace  Nspanwise  Sspace
12           1.0     30         -1.5

COMPONENT
1

YDUPLICATE
0.0

ANGLE
0.0

SCALE
1.0   1.0   1.0

TRANSLATE
0.0   0.0   0.0

# y = 0.000 m  -  raiz (centro)
SECTION
#Xle      Yle      Zle      Chord    Ainc   Nspan  Sspace
18.5538  0.0000   -1.0400  14.6035  -0.000
AFILE
a1.dat
CONTROL
flap      1.0   0.680   0. 0. 0.   +1
DESIGN
iw 1.0

# y = 2.980 m  -  lateral da fuselagem - inicio do slat
SECTION
#Xle      Yle      Zle      Chord    Ainc   Nspan  Sspace
20.8568  2.9800   -0.8055  12.3005  -0.279
AFILE
a1.dat
CONTROL
slat     -1.0  -0.140   0. 0. 0.   +1
CONTROL
flap      1.0   0.680   0. 0. 0.   +1
DESIGN
iw 1.0

# y = 12.000 m  -  QUEBRA - fim do bordo de fuga vertical
SECTION
#Xle      Yle      Zle      Chord    Ainc   Nspan  Sspace
27.8275  12.0000  -0.0956  5.3298   -1.123
AFILE
a1.dat
CONTROL
slat     -1.0  -0.140   0. 0. 0.   +1
CONTROL
flap      1.0   0.680   0. 0. 0.   +1
DESIGN
iw 1.0

# y = 19.876 m  -  fim do flap
SECTION
#Xle      Yle      Zle      Chord    Ainc   Nspan  Sspace
33.9143  19.8764  0.5243   4.0264   -1.859
AFILE
a1.dat
CONTROL
slat     -1.0  -0.140   0. 0. 0.   +1
CONTROL
flap      1.0   0.680   0. 0. 0.   +1
DESIGN
iw 1.0

# y = 21.807 m  -  inicio do aileron
SECTION
#Xle      Yle      Zle      Chord    Ainc   Nspan  Sspace
35.4066  21.8074  0.6763   3.7068   -2.040
AFILE
a1.dat
CONTROL
slat     -1.0  -0.140   0. 0. 0.   +1
CONTROL
aileron  -1.0   0.700   0. 0. 0.   -1
DESIGN
iw 1.0

# y = 28.863 m  -  fim do slat
SECTION
#Xle      Yle      Zle      Chord    Ainc   Nspan  Sspace
40.8590  28.8627  1.2315   2.5392   -2.700
AFILE
a1.dat
CONTROL
slat     -1.0  -0.140   0. 0. 0.   +1
CONTROL
aileron  -1.0   0.700   0. 0. 0.   -1
DESIGN
iw 1.0

# y = 32.070 m  -  ponta
SECTION
#Xle      Yle      Zle      Chord    Ainc   Nspan  Sspace
43.3373  32.0697  1.4839   2.0085   -3.000
AFILE
a1.dat
CONTROL
aileron  -1.0   0.700   0. 0. 0.   -1
DESIGN
iw 1.0

#----------------------------------------------------------------------
SURFACE
Stab
#Nchordwise  Cspace  Nspanwise  Sspace
8            1.0     16         -1.5

COMPONENT
2

YDUPLICATE
0.0

SCALE
1.0  1.0  1.0

TRANSLATE
0.0  0.0  0.0

# raiz EH
SECTION
#Xle      Yle      Zle      Chord    Ainc   Nspan  Sspace
60.0700  0.0000   2.2200   5.0200   0.000
CONTROL
elevator  1.0   0.650   0. 0. 0.   +1
DESIGN
it 1.0

# ponta EH
SECTION
#Xle      Yle      Zle      Chord    Ainc   Nspan  Sspace
66.1400  7.9065   3.1292   2.0080   0.000
CONTROL
elevator  1.0   0.650   0. 0. 0.   +1
DESIGN
it 1.0

#----------------------------------------------------------------------
SURFACE
Fin
#Nchordwise  Cspace  Nspanwise  Sspace
8            1.0     12          1.0

COMPONENT
3

SCALE
1.0  1.0  1.0

TRANSLATE
0.0  0.0  0.0

# raiz EV
SECTION
#Xle      Yle      Zle      Chord    Ainc   Nspan  Sspace
57.4190  0.0000   3.5700   7.6710   0.000
CONTROL
rudder    1.0   0.680   0. 0. 0.   +1

# ponta EV
SECTION
#Xle      Yle      Zle      Chord    Ainc   Nspan  Sspace
66.2986  0.0000   12.8465  2.9917   0.000
CONTROL
rudder    1.0   0.680   0. 0. 0.   +1

#----------------------------------------------------------------------
BODY
Fuselage
# Nbody Bspace
30 1.0

SCALE
# comprimento, diametro, diametro
65.090  5.960  5.960

TRANSLATE
0.0  0.0  0.0

BFILE
fuseB737_nondim.dat

#----------------------------------------------------------------------
SURFACE
Nacelle
#Nchordwise  Cspace  Nspanwise  Sspace
6            1.0     12          0.0

COMPONENT
4

YDUPLICATE
0.0

SCALE
# comprimento, raio horizontal, raio vertical
6.060  1.970  1.970

TRANSLATE
21.000  11.000  -2.900

SECTION
#Xle   Yle      Zle      Chord   Ainc  Nspan  Sspace
 0.00  0.0000   1.0000   1.0     0.    1      0.
SECTION
#Xle   Yle      Zle      Chord   Ainc  Nspan  Sspace
 0.00  0.5000   0.8660   1.0     0.    1      0.
SECTION
#Xle   Yle      Zle      Chord   Ainc  Nspan  Sspace
 0.00  0.8660   0.5000   1.0     0.    1      0.
SECTION
#Xle   Yle      Zle      Chord   Ainc  Nspan  Sspace
 0.00  1.0000   0.0000   1.0     0.    1      0.
SECTION
#Xle   Yle      Zle      Chord   Ainc  Nspan  Sspace
 0.00  0.8660   -0.5000  1.0     0.    1      0.
SECTION
#Xle   Yle      Zle      Chord   Ainc  Nspan  Sspace
 0.00  0.5000   -0.8660  1.0     0.    1      0.
SECTION
#Xle   Yle      Zle      Chord   Ainc  Nspan  Sspace
 0.00  0.0000   -1.0000  1.0     0.    1      0.
SECTION
#Xle   Yle      Zle      Chord   Ainc  Nspan  Sspace
 0.00  -0.5000  -0.8660  1.0     0.    1      0.
SECTION
#Xle   Yle      Zle      Chord   Ainc  Nspan  Sspace
 0.00  -0.8660  -0.5000  1.0     0.    1      0.
SECTION
#Xle   Yle      Zle      Chord   Ainc  Nspan  Sspace
 0.00  -1.0000  -0.0000  1.0     0.    1      0.
SECTION
#Xle   Yle      Zle      Chord   Ainc  Nspan  Sspace
 0.00  -0.8660  0.5000   1.0     0.    1      0.
SECTION
#Xle   Yle      Zle      Chord   Ainc  Nspan  Sspace
 0.00  -0.5000  0.8660   1.0     0.    1      0.
SECTION
#Xle   Yle      Zle      Chord   Ainc  Nspan  Sspace
 0.00  -0.0000  1.0000   1.0     0.    1      0.
